*Heading
** Job name: Tensile Model name: Model-1
** Generated by: Abaqus/CAE 6.14-1
*Preprint, echo=NO, model=NO, history=NO, contact=NO
**
** PARTS
**
*Part, name=Square
*Node
 1, 0., 5.
 2, 10., 5.
 3, 0., 15.
 4, 10., 15.
*Element, type=CPE4RT
1, 1, 2, 4, 3
*Nset, nset=Set-1, generate
 1, 4, 1
*Elset, elset=Set-1
 1
** Section: Section-1
*Solid Section, elset=Set-1, material=Steel
1.
*End Part
**
**
** ASSEMBLY
**
*Assembly, name=Assembly
**
*Instance, name=Square-1, part=Square
*End Instance
**
*Nset, nset=Set-1, instance=Square-1
 1, 3
*Elset, elset=Set-1, instance=Square-1
 1
*Nset, nset=Set-2, instance=Square-1
 1, 2
*Elset, elset=Set-2, instance=Square-1
 1
*Nset, nset=Set-3, instance=Square-1
 2, 4
*Elset, elset=Set-3, instance=Square-1
 1
*Nset, nset=Set-4, instance=Square-1
 3, 4
*Elset, elset=Set-4, instance=Square-1
 1
*Nset, nset=Set-5, instance=Square-1
 1, 2
*Elset, elset=Set-5, instance=Square-1
 1
*Nset, nset=Set-6, instance=Square-1
 3, 4
*Elset, elset=Set-6, instance=Square-1
 1
*End Assembly
*Amplitude, name=Amp-1
 0., 0., 0.1, 1.
**
** MATERIALS
**
*Material, name=Steel
*Conductivity
34.0
*Density
 7.83e-09
*Expansion
 1.23e-05
*Inelastic Heat Fraction
0.9
*USER MATERIAL,CONSTANTS=14
206000, 0.3, 806e8, 614, 0.168, 0.0089, 1.1, 1.0
20.0, 1540, 0.9, 7.83e-09, 4.6e+08, 1
*DEPVAR
7
*Specific Heat
4.6e+08
**
** PREDEFINED FIELDS
**
*INITIAL CONDITIONS, TYPE=SOLUTION
Set-5, , , , , 20
** Name: Predefined Field-1 Type: Temperature
*Initial Conditions, type=TEMPERATURE
Set-5, 20.
** ----------------------------------------------------------------
**
** STEP: Step-1
**
*Step, name=Step-1, nlgeom=YES
*Dynamic Temperature-displacement, Explicit
, 0.1
*Bulk Viscosity
0.06, 1.2
**
** BOUNDARY CONDITIONS
**
** Name: BC-1 Type: Displacement/Rotation
*Boundary
Set-5, 1, 1
Set-5, 2, 2
Set-5, 6, 6
** Name: BC-3 Type: Displacement/Rotation
*Boundary, amplitude=Amp-1
Set-6, 1, 1, 100.
Set-6, 2, 2
Set-6, 6, 6
**
** OUTPUT REQUESTS
**
*Restart, write, number interval=1, time marks=NO
**
** FIELD OUTPUT: F-Output-1
**
*Output, field
*Node Output
A, RF, U, V
*Element Output, directions=YES
ER, ERV, EVF, LE, PE, SDV1, PEEQVAVG, PEVAVG, S, SVAVG, TEMP, TEMPMAVG, DENSITY
*Contact Output
CSTRESS,
**
** HISTORY OUTPUT: H-Output-1
**
*Output, history, variable=PRESELECT
**
** HISTORY OUTPUT: H-Output-2
**
*Output, history, time interval=1e-4
*Element Output, elset=Square-1.Set-1
MISES, S11, S22, S33, S12, SDV1, TEMP, DENSITY
*Incrementation Output
DT,
*End Step
