*Heading
** Job name: Taylor Model name: Model-1
** Generated by: Abaqus/CAE 6.14-1
*Preprint, echo=NO, model=NO, history=NO, contact=NO
**
** PARTS
**
*Part, name=Part-1
*Node
      1,   2.12199259,  -6.19999981,   2.39523435
      2,           0.,  -6.19999981,   3.20000005
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*Element, type=C3D8RT
   1,   81,  674,  869,   80,    1,   22,   31,    4
   2,  674,  675,  870,  869,   22,   23,   30,   31
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*Nset, nset=Set-1, generate
    1,  5740,     1
*Elset, elset=Set-1, generate
    1,  4455,     1
*Elset, elset=Set-angle
     247
** Section: Section-1
*Solid Section, elset=Set-1, material=Steel
,
*End Part
**
**
** ASSEMBLY
**
*Assembly, name=Assembly
**
*Instance, name=Part-1-1, part=Part-1
*End Instance
**
*Nset, nset=Set-7, instance=Part-1-1
    1,    2,    3,    4,    9,   10
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*Elset, elset=Set-7, instance=Part-1-1
    1,    2,    3,    4,    5,    6
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*Nset, nset=Set-8, instance=Part-1-1
    2,    3,    6,    7,    9,   11
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*Elset, elset=Set-8, instance=Part-1-1
    6,   12,   18,   24,   30,   36
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*Nset, nset=Set-9, instance=Part-1-1
    9,   10,   11,   12,   13,   14
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*Elset, elset=Set-9, instance=Part-1-1
  247,  254,  261,  268,  275,  282
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*End Assembly
*Amplitude, name=Amp-1
             0.,              0.,           0.001,              1.
**
** MATERIALS
**
*Material, name=Steel
*Conductivity
34.0,
*Density
7.83e-09,
*Expansion
1.23e-05,
*Inelastic Heat Fraction
0.9,
*USER MATERIAL,CONSTANTS=14
206000, 0.3, 806, 614, 0.168, 0.0089, 1.1, 1.0
20.0, 1540, 0.9, 7.83e-09, 4.6e+08, 1
*DEPVAR
7
*Specific Heat
4.6e+08,
**
** PREDEFINED FIELDS
**
** Name: Predefined Field-1   Type: Velocity
*INITIAL CONDITIONS, TYPE=SOLUTION
Part-1-1.Set-1, , , , , 20
*Initial Conditions, type=VELOCITY
Part-1-1.Set-1, 1, 0.
Part-1-1.Set-1, 2, -287000.
Part-1-1.Set-1, 3, 0.
*Initial Conditions, type=TEMPERATURE
Part-1-1.Set-1, 20.
** ----------------------------------------------------------------
**
** STEP: Step-1
**
*Step, name=Step-1, nlgeom=YES
*Dynamic Temperature-displacement, Explicit
, 8e-05
*Bulk Viscosity
0.06, 1.2
**
** BOUNDARY CONDITIONS
**
** Name: BC-1 Type: Displacement/Rotation
*Boundary
Set-7, 2, 2
** Name: BC-2 Type: Symmetry/Antisymmetry/Encastre
*Boundary
Set-8, XSYMM
** Name: BC-3 Type: Symmetry/Antisymmetry/Encastre
*Boundary
Set-9, ZSYMM
**
** OUTPUT REQUESTS
**
*Restart, write, number interval=1, time marks=NO
**
** FIELD OUTPUT: F-Output-1
**
*Output, field, number interval=20
*Node Output
A, RF, U, V
*Element Output, directions=YES
ER, ERV, EVF, LE, PE, SDV1, PEEQVAVG, PEVAVG, S, SVAVG, TEMP, TEMPMAVG, DENSITY
*Contact Output
CSTRESS,
**
** HISTORY OUTPUT: H-Output-1
**
*Output, history, variable=PRESELECT
**
** HISTORY OUTPUT: H-Output-2
**
*Output, history, time interval=1e-07
*Element Output, elset=Part-1-1.Set-angle
MISES, SDV1, TEMP, DENSITY
*Incrementation Output
DT,
*End Step
